# Начал я с того,что выгрузил файлик с экспериментальными данными
generate(Δ) :=
    r
    i ← 0
    θ ← π/4
    while θ ≤ 2*π + π/4
        r[i, 0] ← θ
        r[i, 1] ←
            sec(θ) if 7*π/4 ≤ θ < 2*π + π/4
            csc(θ) if π/4 ≤ θ < 3*π/4
            csc(θ - π/2) if 3*π/4 ≤ θ < 5*π/4
            sec(θ + π/2) if 5*π/4 ≤ θ < 7*π/4
        i ← i + 1
        θ ← θ + Δ
    return r
F := READCSV("D:\programming\python\Diploma\data\data.csv")
torad(X) :=
    r
    for i ∈ 0 .. rows(X) - 1
        r[i, 0] ← X[i, 0]*2*π/360
        r[i, 1] ← X[i, 1]
    r
todeg(X) :=
    r
    for i ∈ 0 .. rows(X) - 1
        r[i, 0] ← X[i, 0]*360/(2*π)
    r[:, 1] ← X[:, 1]
    r
F = [
    0, 1.61276;
    0.0523599, 1.58851;
    0.10472, 1.60582;
    0.15708, 1.58113;
    0.20944, 1.57456;
    0.261799, 1.5675;
    0.314159, 1.58204;
    0.366519, 1.58006;
    0.418879, 1.58794;
    0.471239, 1.60852
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]
# Тут я построил кучу графиков и пытаюсь найти закономерность
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toDecart(X) :=
    r
    for i ∈ 0 .. rows(X) - 1
        r[i, 0] ← X[i, 1]*cos(X[i, 0]*rad)
        r[i, 1] ← X[i, 1]*sin(X[i, 0]*rad)
    r
F2 := toDecart(F)
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F2 = [
    1.61276, 0;
    1.58633, 0.0831362;
    1.59703, 0.167854;
    1.56166, 0.247343;
    1.54015, 0.327369;
    1.51409, 0.405699;
    1.50461, 0.488877;
    1.47511, 0.566242;
    1.45065, 0.645872;
    1.4332, 0.730252
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]
# Меня осенило и я решил численно продиф-ать дважды, чтобы посмотреть на перегибы
der2(X) :=
    r
    for i ∈ 1 .. rows(X) - 2
        r[i, 0] ← X[i, 0]
        r[i, 1] ← (X[i - 1, 1] - 2*X[i, 1] + X[i + 1, 1])/(X[i, 0] - X[i - 1, 0])^2
    r
f2 := der2(F)  # Теория оказалась реалистичной, там где вторая производная сильно отходит от нуля, кривая резко поворачивает
f2 = [
    0, 0;
    0.0523599, 15.16;
    0.10472, -15.322;
    0.15708, 6.6094;
    0.20944, -0.177147;
    0.261799, 7.87835;
    0.314159, -6.02661;
    0.366519, 3.59673;
    0.418879, 4.6337;
    0.471239, 1.71812
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]
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3*π/4 = 2.35619
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# Дальше хочется проверить на более идеальных примерах, то есть построить, например, квадрат в полярных координатах и посмотреть на 2ую производную
# Построил квадратик и проверил теорию на нём
A := generate(0.04)
A = [
    0.785398, 1.41421;
    0.825398, 1.36088;
    0.865398, 1.31345;
    0.905398, 1.27118;
    0.945398, 1.23346;
    0.985398, 1.19977;
    1.0254, 1.1697;
    1.0654, 1.14288;
    1.1054, 1.11902;
    1.1454, 1.09785
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]
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a2 := der2(A)
# Здесь видно что на изгибах вторая производная сильноотходит от нуля
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A1 := A
for i ∈ 0 .. rows(A)
    A1[i, 1] ← A1[i, 1] - a2[i, 1]
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der1(X) :=
    r
    for i ∈ 1 .. rows(X) - 1
        r[i, 0] ← X[i, 0]
        r[i, 1] ← (X[i, 1] - X[i - 1, 1])/|X[i, 0] - X[i - 1, 0]|
    r
a1 := der1(A)
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gen1(Δ) :=
    r
    θ ← π/4
    i ← 0
    while θ ≤ 3*π/4
        r[i, 0] ← θ
        r[i, 1] ← 3*sin(θ)
        i ← i + 1
        θ ← θ + Δ
    r
b := gen1(0.04)
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b2 := der2(b)
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